*title
2D Plane Stress Element
*control
npoin=42, nelem=29, nsect=1, nmate=1, ndofn=2, nvfix=4
*node
1  -0.200000003   0.150000006    0.0
2           0.0   0.150000006    0.0
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*element, nnode=4
1   1  11  33  16 1 1
2  11  12  34  33 1 1
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*material
1,2.05E11,0.29
*section
1,0.01
*boundary
